<Lems>
  <DefaultRun component="sawtooth"/>

  <Dimension name="voltage" m="1" l="2" t="-3" i="-1"/>
  <Dimension name="voltage_gradient" m="1" l="2" t="-4" i="-1"/>

  <Unit symbol="V" dimension="voltage"/>
  <Unit symbol="V_per_t" dimension="voltage_gradient"/>

  <ComponentType name="SpikeGenerator">
    <Parameter name="period" dimension="time"/>
    <EventPort name="spike-out" direction="out"/>
    <Exposure name="tsince" dimension="time"/>
    <Behavior>
      <StateVariable name="tsince" exposure="tsince" dimension="time"/>
      <TimeDerivative variable="tsince" value="1"/>
      <OnCondition test="tsince .gt. period">
	<StateAssignment variable="tsince" value="0"/>
	<EventOut port="spike-out"/>
      </OnCondition>
    </Behavior>
  </ComponentType>

  <ComponentType name="SawtoothGenerator">
    <Parameter name="dV_per_dt" dimension="voltage_gradient"/>
    <Parameter name="threshold" dimension="voltage"/>
    <EventPort name="spike-in" direction="in"/>
    <Exposure name="v" dimension="voltage"/>
    <Behavior>
      <StateVariable name="v" exposure="v" dimension="voltage"/>
      <TimeDerivative variable="v" value="dV_per_dt"/>
      <!--<TimeDerivative variable="v" value="1-95*v/100"/>-->
      <OnEvent port="spike-in">
	<StateAssignment variable="v" value="0"/>
      </OnEvent>
    </Behavior>
  </ComponentType>

  <Include file="SimpleSimulation.xml"/>
  <Unit symbol="s" dimension="time"/>
  <Dimension name="time" t="1"/>

  <ComponentType name="SpikeConnector">
    <Child name="Sp1" type="SpikeGenerator"/>
    <Child name="St1" type="SawtoothGenerator"/>

    <Behavior>
      <Build>
	<EventConnection from="Sp1" to="St1" srcport='spike-out' dstport='spike-in'/>
      </Build>
    </Behavior>
  </ComponentType>

  <SpikeConnector id="spikeconn1">
    <Sp1 period="10s"/>
    <St1 threshold="1 V"
	 dV_per_dt="0.1 V_per_t"/>
  </SpikeConnector>

  <Simulation id="sawtooth" length="10s" step="0.1s" target="spikeconn1">
    <Display id="d0" timeScale="10s" title="Sawtooth waveform">
      <Line id="V" quantity="St1/v" scale="1s" color="#ff0000"/>
    </Display>
  </Simulation>
</Lems>
